Clear

New Circuit.Full_Network bus1=st_mat pu=1.0 basekV=230.0 R1=0.00001 X1=0.00001 R0=0.00001 X0=0.00001

Redirect p28uhs3_1247/Transformers.dss
Redirect p28uhs3_1247/p28uhs3_1247--p28udt1437/Transformers.dss
Redirect p28uhs3_1247/p28uhs3_1247--p28udt9267/Transformers.dss
Redirect p28uhs3_1247/p28uhs3_1247--p28udt1592/Transformers.dss
Redirect p28uhs3_1247/p28uhs3_1247--p28udt1160/Transformers.dss
Redirect p28uhs3_1247/p28uhs3_1247--p28udt2162/Transformers.dss
Redirect p28uhs4_1247/Transformers.dss
Redirect p28uhs4_1247/p28uhs4_1247--p28udt6882/Transformers.dss
Redirect p28uhs4_1247/p28uhs4_1247--p28udt9943/Transformers.dss
Redirect p28uhs4_1247/p28uhs4_1247--p28udt2147/Transformers.dss
Redirect p28uhs5_1247/Transformers.dss
Redirect p28uhs5_1247/p28uhs5_1247--p28udt7571/Transformers.dss
Redirect p28uhs5_1247/p28uhs5_1247--p28udt7565/Transformers.dss
Redirect p28uhs5_1247/p28uhs5_1247--p28udt7478/Transformers.dss
Redirect p28uhs5_1247/p28uhs5_1247--p28udt10850/Transformers.dss
Redirect p28uhs5_1247/p28uhs5_1247--p28udt7557/Transformers.dss
Redirect p28uhs5_1247/p28uhs5_1247--p28udt7564/Transformers.dss
Redirect p28uhs0_1247/Transformers.dss
Redirect p28uhs0_1247/p28uhs0_1247--p28udt11302/Transformers.dss
Redirect p28uhs0_1247/p28uhs0_1247--p28udt11332/Transformers.dss
Redirect p28uhs0_1247/p28uhs0_1247--p28udt3174/Transformers.dss
Redirect p28uhs0_1247/p28uhs0_1247--p28udt11286/Transformers.dss
Redirect p28uhs0_1247/p28uhs0_1247--p28udt11160/Transformers.dss
Redirect p28uhs2_1247/Transformers.dss
Redirect p28uhs2_1247/p28uhs2_1247--p28udt6085/Transformers.dss
Redirect p28uhs2_1247/p28uhs2_1247--p28udt9044/Transformers.dss
Redirect p28uhs2_1247/p28uhs2_1247--p28udt8719/Transformers.dss
Redirect p28uhs2_1247/p28uhs2_1247--p28udt6746/Transformers.dss
Redirect p28uhs2_1247/p28uhs2_1247--p28udt6226/Transformers.dss
Redirect p28uhs1_1247/Transformers.dss
Redirect p28uhs1_1247/p28uhs1_1247--p28udt10097/Transformers.dss
Redirect p28uhs1_1247/p28uhs1_1247--p28udt7270/Transformers.dss
Redirect p28uhs1_1247/p28uhs1_1247--p28udt7821/Transformers.dss
Redirect p28uhs1_1247/p28uhs1_1247--p28udt2954/Transformers.dss
Redirect p28uhs1_1247/p28uhs1_1247--p28udt7241/Transformers.dss
Redirect p28uhs6_1247/Transformers.dss
Redirect p28uhs6_1247/p28uhs6_1247--p28udt10249/Transformers.dss
Redirect p28uhs6_1247/p28uhs6_1247--p28udt6248/Transformers.dss
Redirect p28uhs6_1247/p28uhs6_1247--p28udt6709/Transformers.dss
Redirect p28uhs6_1247/p28uhs6_1247--p28udt6743/Transformers.dss
Redirect subtransmission/Transformers.dss
Redirect p28uhs7_1247/Transformers.dss
Redirect p28uhs7_1247/p28uhs7_1247--p28udt3580/Transformers.dss
Redirect p28uhs1_1247/Regulators.dss
Redirect p28uhs1_1247/p28uhs1_1247--p28udt10097/Regulators.dss
Redirect p28uhs1_1247/p28uhs1_1247--p28udt7270/Regulators.dss
Redirect p28uhs1_1247/p28uhs1_1247--p28udt7821/Regulators.dss
Redirect p28uhs1_1247/p28uhs1_1247--p28udt7241/Regulators.dss
Redirect p28uhs0_1247/Regulators.dss
Redirect p28uhs0_1247/p28uhs0_1247--p28udt11332/Regulators.dss
Redirect p28uhs0_1247/p28uhs0_1247--p28udt3174/Regulators.dss
Redirect p28uhs0_1247/p28uhs0_1247--p28udt11286/Regulators.dss
Redirect p28uhs0_1247/p28uhs0_1247--p28udt11160/Regulators.dss
Redirect p28uhs2_1247/Regulators.dss
Redirect p28uhs2_1247/p28uhs2_1247--p28udt6085/Regulators.dss
Redirect p28uhs2_1247/p28uhs2_1247--p28udt9044/Regulators.dss
Redirect p28uhs2_1247/p28uhs2_1247--p28udt8719/Regulators.dss
Redirect p28uhs2_1247/p28uhs2_1247--p28udt6746/Regulators.dss
Redirect p28uhs3_1247/Regulators.dss
Redirect p28uhs3_1247/p28uhs3_1247--p28udt1437/Regulators.dss
Redirect p28uhs3_1247/p28uhs3_1247--p28udt9267/Regulators.dss
Redirect p28uhs3_1247/p28uhs3_1247--p28udt1160/Regulators.dss
Redirect p28uhs3_1247/p28uhs3_1247--p28udt2162/Regulators.dss
Redirect p28uhs5_1247/Regulators.dss
Redirect p28uhs5_1247/p28uhs5_1247--p28udt7478/Regulators.dss
Redirect p28uhs5_1247/p28uhs5_1247--p28udt10850/Regulators.dss
Redirect p28uhs5_1247/p28uhs5_1247--p28udt7557/Regulators.dss
Redirect p28uhs5_1247/p28uhs5_1247--p28udt7564/Regulators.dss
Redirect p28uhs4_1247/Regulators.dss
Redirect p28uhs4_1247/p28uhs4_1247--p28udt6882/Regulators.dss
Redirect p28uhs6_1247/Regulators.dss
Redirect p28uhs6_1247/p28uhs6_1247--p28udt10249/Regulators.dss
Redirect p28uhs6_1247/p28uhs6_1247--p28udt6248/Regulators.dss
Redirect p28uhs6_1247/p28uhs6_1247--p28udt6709/Regulators.dss
Redirect p28uhs6_1247/p28uhs6_1247--p28udt6743/Regulators.dss
Redirect p28uhs7_1247/Regulators.dss
Redirect p28uhs3_1247/p28uhs3_1247--p28udt1437/Loads.dss
Redirect p28uhs3_1247/p28uhs3_1247--p28udt9267/Loads.dss
Redirect p28uhs3_1247/p28uhs3_1247--p28udt1592/Loads.dss
Redirect p28uhs3_1247/p28uhs3_1247--p28udt1160/Loads.dss
Redirect p28uhs3_1247/p28uhs3_1247--p28udt2162/Loads.dss
Redirect p28uhs4_1247/p28uhs4_1247--p28udt6882/Loads.dss
Redirect p28uhs4_1247/p28uhs4_1247--p28udt9943/Loads.dss
Redirect p28uhs4_1247/p28uhs4_1247--p28udt2147/Loads.dss
Redirect p28uhs5_1247/p28uhs5_1247--p28udt7571/Loads.dss
Redirect p28uhs5_1247/p28uhs5_1247--p28udt7565/Loads.dss
Redirect p28uhs5_1247/p28uhs5_1247--p28udt7478/Loads.dss
Redirect p28uhs5_1247/p28uhs5_1247--p28udt10850/Loads.dss
Redirect p28uhs5_1247/p28uhs5_1247--p28udt7557/Loads.dss
Redirect p28uhs5_1247/p28uhs5_1247--p28udt7564/Loads.dss
Redirect p28uhs0_1247/p28uhs0_1247--p28udt11302/Loads.dss
Redirect p28uhs0_1247/p28uhs0_1247--p28udt11332/Loads.dss
Redirect p28uhs0_1247/p28uhs0_1247--p28udt3174/Loads.dss
Redirect p28uhs0_1247/p28uhs0_1247--p28udt11286/Loads.dss
Redirect p28uhs0_1247/p28uhs0_1247--p28udt11160/Loads.dss
Redirect p28uhs2_1247/p28uhs2_1247--p28udt6085/Loads.dss
Redirect p28uhs2_1247/p28uhs2_1247--p28udt9044/Loads.dss
Redirect p28uhs2_1247/p28uhs2_1247--p28udt8719/Loads.dss
Redirect p28uhs2_1247/p28uhs2_1247--p28udt6746/Loads.dss
Redirect p28uhs2_1247/p28uhs2_1247--p28udt6226/Loads.dss
Redirect p28uhs1_1247/p28uhs1_1247--p28udt10097/Loads.dss
Redirect p28uhs1_1247/p28uhs1_1247--p28udt7270/Loads.dss
Redirect p28uhs1_1247/p28uhs1_1247--p28udt7821/Loads.dss
Redirect p28uhs1_1247/p28uhs1_1247--p28udt2954/Loads.dss
Redirect p28uhs1_1247/p28uhs1_1247--p28udt7241/Loads.dss
Redirect p28uhs6_1247/p28uhs6_1247--p28udt10249/Loads.dss
Redirect p28uhs6_1247/p28uhs6_1247--p28udt6248/Loads.dss
Redirect p28uhs6_1247/p28uhs6_1247--p28udt6709/Loads.dss
Redirect p28uhs6_1247/p28uhs6_1247--p28udt6743/Loads.dss
Redirect p28uhs7_1247/p28uhs7_1247--p28udt3580/Loads.dss
Redirect p28uhs3_1247/LineCodes.dss
Redirect p28uhs3_1247/p28uhs3_1247--p28udt1437/LineCodes.dss
Redirect p28uhs3_1247/p28uhs3_1247--p28udt9267/LineCodes.dss
Redirect p28uhs3_1247/p28uhs3_1247--p28udt1592/LineCodes.dss
Redirect p28uhs3_1247/p28uhs3_1247--p28udt1160/LineCodes.dss
Redirect p28uhs3_1247/p28uhs3_1247--p28udt2162/LineCodes.dss
Redirect p28uhs4_1247/LineCodes.dss
Redirect p28uhs4_1247/p28uhs4_1247--p28udt6882/LineCodes.dss
Redirect p28uhs4_1247/p28uhs4_1247--p28udt9943/LineCodes.dss
Redirect p28uhs4_1247/p28uhs4_1247--p28udt2147/LineCodes.dss
Redirect p28uhs5_1247/LineCodes.dss
Redirect p28uhs5_1247/p28uhs5_1247--p28udt7571/LineCodes.dss
Redirect p28uhs5_1247/p28uhs5_1247--p28udt7565/LineCodes.dss
Redirect p28uhs5_1247/p28uhs5_1247--p28udt7478/LineCodes.dss
Redirect p28uhs5_1247/p28uhs5_1247--p28udt10850/LineCodes.dss
Redirect p28uhs5_1247/p28uhs5_1247--p28udt7557/LineCodes.dss
Redirect p28uhs5_1247/p28uhs5_1247--p28udt7564/LineCodes.dss
Redirect p28uhs0_1247/LineCodes.dss
Redirect p28uhs0_1247/p28uhs0_1247--p28udt11302/LineCodes.dss
Redirect p28uhs0_1247/p28uhs0_1247--p28udt11332/LineCodes.dss
Redirect p28uhs0_1247/p28uhs0_1247--p28udt3174/LineCodes.dss
Redirect p28uhs0_1247/p28uhs0_1247--p28udt11286/LineCodes.dss
Redirect p28uhs0_1247/p28uhs0_1247--p28udt11160/LineCodes.dss
Redirect p28uhs2_1247/LineCodes.dss
Redirect p28uhs2_1247/p28uhs2_1247--p28udt6085/LineCodes.dss
Redirect p28uhs2_1247/p28uhs2_1247--p28udt9044/LineCodes.dss
Redirect p28uhs2_1247/p28uhs2_1247--p28udt8719/LineCodes.dss
Redirect p28uhs2_1247/p28uhs2_1247--p28udt6746/LineCodes.dss
Redirect p28uhs2_1247/p28uhs2_1247--p28udt6226/LineCodes.dss
Redirect p28uhs1_1247/LineCodes.dss
Redirect p28uhs1_1247/p28uhs1_1247--p28udt10097/LineCodes.dss
Redirect p28uhs1_1247/p28uhs1_1247--p28udt7270/LineCodes.dss
Redirect p28uhs1_1247/p28uhs1_1247--p28udt7821/LineCodes.dss
Redirect p28uhs1_1247/p28uhs1_1247--p28udt2954/LineCodes.dss
Redirect p28uhs1_1247/p28uhs1_1247--p28udt7241/LineCodes.dss
Redirect p28uhs6_1247/LineCodes.dss
Redirect p28uhs6_1247/p28uhs6_1247--p28udt10249/LineCodes.dss
Redirect p28uhs6_1247/p28uhs6_1247--p28udt6248/LineCodes.dss
Redirect p28uhs6_1247/p28uhs6_1247--p28udt6709/LineCodes.dss
Redirect p28uhs6_1247/p28uhs6_1247--p28udt6743/LineCodes.dss
Redirect subtransmission/LineCodes.dss
Redirect p28uhs7_1247/LineCodes.dss
Redirect p28uhs7_1247/p28uhs7_1247--p28udt3580/LineCodes.dss
Redirect p28uhs3_1247/Lines.dss
Redirect p28uhs3_1247/p28uhs3_1247--p28udt1437/Lines.dss
Redirect p28uhs3_1247/p28uhs3_1247--p28udt9267/Lines.dss
Redirect p28uhs3_1247/p28uhs3_1247--p28udt1592/Lines.dss
Redirect p28uhs3_1247/p28uhs3_1247--p28udt1160/Lines.dss
Redirect p28uhs3_1247/p28uhs3_1247--p28udt2162/Lines.dss
Redirect p28uhs4_1247/Lines.dss
Redirect p28uhs4_1247/p28uhs4_1247--p28udt6882/Lines.dss
Redirect p28uhs4_1247/p28uhs4_1247--p28udt9943/Lines.dss
Redirect p28uhs4_1247/p28uhs4_1247--p28udt2147/Lines.dss
Redirect p28uhs5_1247/Lines.dss
Redirect p28uhs5_1247/p28uhs5_1247--p28udt7571/Lines.dss
Redirect p28uhs5_1247/p28uhs5_1247--p28udt7565/Lines.dss
Redirect p28uhs5_1247/p28uhs5_1247--p28udt7478/Lines.dss
Redirect p28uhs5_1247/p28uhs5_1247--p28udt10850/Lines.dss
Redirect p28uhs5_1247/p28uhs5_1247--p28udt7557/Lines.dss
Redirect p28uhs5_1247/p28uhs5_1247--p28udt7564/Lines.dss
Redirect p28uhs0_1247/Lines.dss
Redirect p28uhs0_1247/p28uhs0_1247--p28udt11302/Lines.dss
Redirect p28uhs0_1247/p28uhs0_1247--p28udt11332/Lines.dss
Redirect p28uhs0_1247/p28uhs0_1247--p28udt3174/Lines.dss
Redirect p28uhs0_1247/p28uhs0_1247--p28udt11286/Lines.dss
Redirect p28uhs0_1247/p28uhs0_1247--p28udt11160/Lines.dss
Redirect p28uhs2_1247/Lines.dss
Redirect p28uhs2_1247/p28uhs2_1247--p28udt6085/Lines.dss
Redirect p28uhs2_1247/p28uhs2_1247--p28udt9044/Lines.dss
Redirect p28uhs2_1247/p28uhs2_1247--p28udt8719/Lines.dss
Redirect p28uhs2_1247/p28uhs2_1247--p28udt6746/Lines.dss
Redirect p28uhs2_1247/p28uhs2_1247--p28udt6226/Lines.dss
Redirect p28uhs1_1247/Lines.dss
Redirect p28uhs1_1247/p28uhs1_1247--p28udt10097/Lines.dss
Redirect p28uhs1_1247/p28uhs1_1247--p28udt7270/Lines.dss
Redirect p28uhs1_1247/p28uhs1_1247--p28udt7821/Lines.dss
Redirect p28uhs1_1247/p28uhs1_1247--p28udt2954/Lines.dss
Redirect p28uhs1_1247/p28uhs1_1247--p28udt7241/Lines.dss
Redirect p28uhs6_1247/Lines.dss
Redirect p28uhs6_1247/p28uhs6_1247--p28udt10249/Lines.dss
Redirect p28uhs6_1247/p28uhs6_1247--p28udt6248/Lines.dss
Redirect p28uhs6_1247/p28uhs6_1247--p28udt6709/Lines.dss
Redirect p28uhs6_1247/p28uhs6_1247--p28udt6743/Lines.dss
Redirect subtransmission/Lines.dss
Redirect p28uhs7_1247/Lines.dss
Redirect p28uhs7_1247/p28uhs7_1247--p28udt3580/Lines.dss
Redirect p28uhs0_1247/p28uhs0_1247--p28udt11302/Storage.dss
Redirect p28uhs0_1247/p28uhs0_1247--p28udt11332/Storage.dss
Redirect p28uhs0_1247/p28uhs0_1247--p28udt3174/Storage.dss
Redirect p28uhs0_1247/p28uhs0_1247--p28udt11286/Storage.dss
Redirect p28uhs0_1247/p28uhs0_1247--p28udt11160/Storage.dss
Redirect p28uhs1_1247/p28uhs1_1247--p28udt10097/Storage.dss
Redirect p28uhs1_1247/p28uhs1_1247--p28udt7270/Storage.dss
Redirect p28uhs1_1247/p28uhs1_1247--p28udt7821/Storage.dss
Redirect p28uhs1_1247/p28uhs1_1247--p28udt2954/Storage.dss
Redirect p28uhs1_1247/p28uhs1_1247--p28udt7241/Storage.dss
Redirect p28uhs2_1247/p28uhs2_1247--p28udt6085/Storage.dss
Redirect p28uhs2_1247/p28uhs2_1247--p28udt9044/Storage.dss
Redirect p28uhs2_1247/p28uhs2_1247--p28udt8719/Storage.dss
Redirect p28uhs2_1247/p28uhs2_1247--p28udt6746/Storage.dss
Redirect p28uhs2_1247/p28uhs2_1247--p28udt6226/Storage.dss
Redirect p28uhs3_1247/p28uhs3_1247--p28udt1437/Storage.dss
Redirect p28uhs3_1247/p28uhs3_1247--p28udt9267/Storage.dss
Redirect p28uhs3_1247/p28uhs3_1247--p28udt1592/Storage.dss
Redirect p28uhs3_1247/p28uhs3_1247--p28udt1160/Storage.dss
Redirect p28uhs3_1247/p28uhs3_1247--p28udt2162/Storage.dss
Redirect p28uhs4_1247/p28uhs4_1247--p28udt6882/Storage.dss
Redirect p28uhs4_1247/p28uhs4_1247--p28udt9943/Storage.dss
Redirect p28uhs5_1247/p28uhs5_1247--p28udt7565/Storage.dss
Redirect p28uhs5_1247/p28uhs5_1247--p28udt7571/Storage.dss
Redirect p28uhs5_1247/p28uhs5_1247--p28udt7478/Storage.dss
Redirect p28uhs5_1247/p28uhs5_1247--p28udt10850/Storage.dss
Redirect p28uhs5_1247/p28uhs5_1247--p28udt7557/Storage.dss
Redirect p28uhs5_1247/p28uhs5_1247--p28udt7564/Storage.dss
Redirect p28uhs6_1247/p28uhs6_1247--p28udt10249/Storage.dss
Redirect p28uhs6_1247/p28uhs6_1247--p28udt6248/Storage.dss
Redirect p28uhs6_1247/p28uhs6_1247--p28udt6709/Storage.dss
Redirect p28uhs6_1247/p28uhs6_1247--p28udt6743/Storage.dss
Redirect p28uhs0_1247/p28uhs0_1247--p28udt11302/PVSystems.dss
Redirect p28uhs0_1247/p28uhs0_1247--p28udt11332/PVSystems.dss
Redirect p28uhs0_1247/p28uhs0_1247--p28udt3174/PVSystems.dss
Redirect p28uhs0_1247/p28uhs0_1247--p28udt11286/PVSystems.dss
Redirect p28uhs0_1247/p28uhs0_1247--p28udt11160/PVSystems.dss
Redirect p28uhs1_1247/p28uhs1_1247--p28udt10097/PVSystems.dss
Redirect p28uhs1_1247/p28uhs1_1247--p28udt7270/PVSystems.dss
Redirect p28uhs1_1247/p28uhs1_1247--p28udt7821/PVSystems.dss
Redirect p28uhs1_1247/p28uhs1_1247--p28udt2954/PVSystems.dss
Redirect p28uhs1_1247/p28uhs1_1247--p28udt7241/PVSystems.dss
Redirect p28uhs2_1247/p28uhs2_1247--p28udt6085/PVSystems.dss
Redirect p28uhs2_1247/p28uhs2_1247--p28udt9044/PVSystems.dss
Redirect p28uhs2_1247/p28uhs2_1247--p28udt8719/PVSystems.dss
Redirect p28uhs2_1247/p28uhs2_1247--p28udt6746/PVSystems.dss
Redirect p28uhs2_1247/p28uhs2_1247--p28udt6226/PVSystems.dss
Redirect p28uhs3_1247/p28uhs3_1247--p28udt1437/PVSystems.dss
Redirect p28uhs3_1247/p28uhs3_1247--p28udt9267/PVSystems.dss
Redirect p28uhs3_1247/p28uhs3_1247--p28udt1592/PVSystems.dss
Redirect p28uhs3_1247/p28uhs3_1247--p28udt1160/PVSystems.dss
Redirect p28uhs3_1247/p28uhs3_1247--p28udt2162/PVSystems.dss
Redirect p28uhs4_1247/p28uhs4_1247--p28udt6882/PVSystems.dss
Redirect p28uhs4_1247/p28uhs4_1247--p28udt9943/PVSystems.dss
Redirect p28uhs5_1247/p28uhs5_1247--p28udt7565/PVSystems.dss
Redirect p28uhs5_1247/p28uhs5_1247--p28udt7571/PVSystems.dss
Redirect p28uhs5_1247/p28uhs5_1247--p28udt7478/PVSystems.dss
Redirect p28uhs5_1247/p28uhs5_1247--p28udt10850/PVSystems.dss
Redirect p28uhs5_1247/p28uhs5_1247--p28udt7557/PVSystems.dss
Redirect p28uhs5_1247/p28uhs5_1247--p28udt7564/PVSystems.dss
Redirect p28uhs6_1247/p28uhs6_1247--p28udt10249/PVSystems.dss
Redirect p28uhs6_1247/p28uhs6_1247--p28udt6248/PVSystems.dss
Redirect p28uhs6_1247/p28uhs6_1247--p28udt6709/PVSystems.dss
Redirect p28uhs6_1247/p28uhs6_1247--p28udt6743/PVSystems.dss
new monitor.m1 element=Line.breaker(r:p28uts0_69-st_mat)p28u_35286 mode=0
new monitor.m2 element=Line.breaker(r:p28uts0_69-st_mat)p28u_35286 mode=1
new energymeter.m3 Line.breaker(r:p28uts0_69-st_mat)p28u_35286

Set Voltagebases=[0.12, 0.208, 0.24, 0.48, 7.2, 12.47, 69.0, 230.0]

Calcvoltagebases

Buscoords Buscoords.dss
set maxcontroliter=50
