New RegControl.reg_creguladortension(r:p28udt3175-p28udt3264) transformer=trans_reg_creguladortension(r:p28udt3175-p28udt3264) winding=2 ptratio=59.99631547328862 band=2.4 vreg = 123.60000000000001

New RegControl.reg_creguladortension(r:p28udt526-p28udt614) transformer=trans_reg_creguladortension(r:p28udt526-p28udt614) winding=2 ptratio=59.99631547328862 band=2.4 vreg = 123.60000000000001
