New RegControl.reg_creguladortension(r:p28udt10435-p28udt10447) transformer=trans_reg_creguladortension(r:p28udt10435-p28udt10447) winding=2 ptratio=59.99631547328862 band=2.4 vreg = 123.60000000000001
