New RegControl.reg_creguladortension(r:p28udt3400-p28udt3465) transformer=trans_reg_creguladortension(r:p28udt3400-p28udt3465) winding=2 ptratio=60.0 band=2.4 vreg = 123.60000000000001

New RegControl.reg_creguladortension(r:p28udt7270-p28udt9270)p28ud4 transformer=trans_reg_creguladortension(r:p28udt7270-p28udt9270)p28ud4 winding=2 ptratio=59.99631547328862 band=2.4 vreg = 123.60000000000001
