New RegControl.reg_creguladortension(r:p28udt1213-p28udt1864) transformer=trans_reg_creguladortension(r:p28udt1213-p28udt1864) winding=2 ptratio=59.99631547328862 band=2.4 vreg = 123.60000000000001

New RegControl.reg_creguladortension(r:p28udt7102-p28udt7458) transformer=trans_reg_creguladortension(r:p28udt7102-p28udt7458) winding=2 ptratio=59.99631547328862 band=2.4 vreg = 123.60000000000001
