Clear

New Circuit.substation_p28uhs2_69 bus1=p28uhs2_69 pu=1.0 basekV=69.0 R1=1e-05 X1=1e-05 R0=1e-05 X0=1e-05

Redirect LineCodes.dss
Redirect p28uhs2_1247--p28udt6085/LineCodes.dss
Redirect p28uhs2_1247--p28udt6226/LineCodes.dss
Redirect p28uhs2_1247--p28udt6746/LineCodes.dss
Redirect p28uhs2_1247--p28udt8719/LineCodes.dss
Redirect p28uhs2_1247--p28udt9044/LineCodes.dss
Redirect Lines.dss
Redirect p28uhs2_1247--p28udt6085/Lines.dss
Redirect p28uhs2_1247--p28udt6226/Lines.dss
Redirect p28uhs2_1247--p28udt6746/Lines.dss
Redirect p28uhs2_1247--p28udt8719/Lines.dss
Redirect p28uhs2_1247--p28udt9044/Lines.dss
Redirect Transformers.dss
Redirect p28uhs2_1247--p28udt6085/Transformers.dss
Redirect p28uhs2_1247--p28udt6226/Transformers.dss
Redirect p28uhs2_1247--p28udt6746/Transformers.dss
Redirect p28uhs2_1247--p28udt8719/Transformers.dss
Redirect p28uhs2_1247--p28udt9044/Transformers.dss
Redirect Regulators.dss
Redirect p28uhs2_1247--p28udt6085/Regulators.dss
Redirect p28uhs2_1247--p28udt6746/Regulators.dss
Redirect p28uhs2_1247--p28udt8719/Regulators.dss
Redirect p28uhs2_1247--p28udt9044/Regulators.dss
Redirect p28uhs2_1247--p28udt6085/Loads.dss
Redirect p28uhs2_1247--p28udt6226/Loads.dss
Redirect p28uhs2_1247--p28udt6746/Loads.dss
Redirect p28uhs2_1247--p28udt8719/Loads.dss
Redirect p28uhs2_1247--p28udt9044/Loads.dss
Redirect p28uhs2_1247--p28udt6085/Storage.dss
Redirect p28uhs2_1247--p28udt6226/Storage.dss
Redirect p28uhs2_1247--p28udt6746/Storage.dss
Redirect p28uhs2_1247--p28udt8719/Storage.dss
Redirect p28uhs2_1247--p28udt9044/Storage.dss
Redirect p28uhs2_1247--p28udt6085/PVSystems.dss
Redirect p28uhs2_1247--p28udt6226/PVSystems.dss
Redirect p28uhs2_1247--p28udt6746/PVSystems.dss
Redirect p28uhs2_1247--p28udt8719/PVSystems.dss
Redirect p28uhs2_1247--p28udt9044/PVSystems.dss
new monitor.m1 element=Line.sb9_p28uhs2_1247_407 mode=0
new monitor.m2 element=Line.sb9_p28uhs2_1247_407 mode=1
new energymeter.m3 Line.sb9_p28uhs2_1247_407

Set Voltagebases=[0.12, 0.208, 0.24, 0.48, 7.2, 12.47, 69.0]

Calcvoltagebases

Buscoords Buscoords.dss
set maxcontroliter=50
