New RegControl.reg_creguladortension(r:p28udt10010-p28umv31) transformer=trans_reg_creguladortension(r:p28udt10010-p28umv31) winding=2 ptratio=59.99631547328862 band=2.4 vreg = 123.60000000000001

New RegControl.reg_creguladortension(r:p28udt1152-p28udt1182) transformer=trans_reg_creguladortension(r:p28udt1152-p28udt1182) winding=2 ptratio=59.99631547328862 band=2.4 vreg = 123.60000000000001
