New RegControl.reg_creguladortension(r:p28udt8962-p28udt8980) transformer=trans_reg_creguladortension(r:p28udt8962-p28udt8980) winding=2 ptratio=59.99631547328862 band=2.4 vreg = 123.60000000000001

New RegControl.reg_creguladortension(r:p28udt8980-p28udt9048) transformer=trans_reg_creguladortension(r:p28udt8980-p28udt9048) winding=2 ptratio=59.99631547328862 band=2.4 vreg = 123.60000000000001
