New Storage.storage_p28ulv2457 phases=3 bus1=p28ulv2457.1.2.3 kV=0.48 kVA=8.8 kWRated=8.0 kWhRated=16.0 kWhStored=8.0 State=IDLING %EffCharge=95.0 %EffDischarge=95.0
New Storage.storage_p28ulv16141 phases=1 bus1=p28ulv16141.1.2 kV=0.24 kVA=8.8 kWRated=8.0 kWhRated=16.0 kWhStored=8.0 State=IDLING %EffCharge=95.0 %EffDischarge=95.0
New Storage.storage_p28ulv36136 phases=3 bus1=p28ulv36136.1.2.3 kV=0.48 kVA=8.8 kWRated=8.0 kWhRated=16.0 kWhStored=8.0 State=IDLING %EffCharge=95.0 %EffDischarge=95.0
