Clear

New Circuit.substation_p28uhs4_69 bus1=p28uhs4_69 pu=1.0 basekV=69.0 R1=1e-05 X1=1e-05 R0=1e-05 X0=1e-05

Redirect LineCodes.dss
Redirect p28uhs4_1247--p28udt2147/LineCodes.dss
Redirect p28uhs4_1247--p28udt6882/LineCodes.dss
Redirect p28uhs4_1247--p28udt9943/LineCodes.dss
Redirect Lines.dss
Redirect p28uhs4_1247--p28udt2147/Lines.dss
Redirect p28uhs4_1247--p28udt6882/Lines.dss
Redirect p28uhs4_1247--p28udt9943/Lines.dss
Redirect Transformers.dss
Redirect p28uhs4_1247--p28udt2147/Transformers.dss
Redirect p28uhs4_1247--p28udt6882/Transformers.dss
Redirect p28uhs4_1247--p28udt9943/Transformers.dss
Redirect Regulators.dss
Redirect p28uhs4_1247--p28udt6882/Regulators.dss
Redirect p28uhs4_1247--p28udt2147/Loads.dss
Redirect p28uhs4_1247--p28udt6882/Loads.dss
Redirect p28uhs4_1247--p28udt9943/Loads.dss
Redirect p28uhs4_1247--p28udt6882/Storage.dss
Redirect p28uhs4_1247--p28udt9943/Storage.dss
Redirect p28uhs4_1247--p28udt6882/PVSystems.dss
Redirect p28uhs4_1247--p28udt9943/PVSystems.dss
new monitor.m1 element=Line.sb2_p28uhs4_1247_351 mode=0
new monitor.m2 element=Line.sb2_p28uhs4_1247_351 mode=1
new energymeter.m3 Line.sb2_p28uhs4_1247_351

Set Voltagebases=[0.12, 0.208, 0.24, 0.48, 7.2, 12.47, 69.0]

Calcvoltagebases

Buscoords Buscoords.dss
set maxcontroliter=50
