New RegControl.reg_creguladortension(r:p28udt6041-p28udt6043) transformer=trans_reg_creguladortension(r:p28udt6041-p28udt6043) winding=2 ptratio=59.99631547328862 band=2.4 vreg = 123.60000000000001

New RegControl.addreg_p28udt3468lv transformer=trans_addreg_p28udt3468lv winding=2 ptratio=2.3094010767585034 band=2.4 vreg = 123.60000000000001
