Clear

New Circuit.substation_p28uhs7_69 bus1=p28uhs7_69 pu=1.0 basekV=69.0 R1=1e-05 X1=1e-05 R0=1e-05 X0=1e-05

Redirect LineCodes.dss
Redirect p28uhs7_1247--p28udt3580/LineCodes.dss
Redirect Lines.dss
Redirect p28uhs7_1247--p28udt3580/Lines.dss
Redirect Transformers.dss
Redirect p28uhs7_1247--p28udt3580/Transformers.dss
Redirect Regulators.dss
Redirect p28uhs7_1247--p28udt3580/Loads.dss
new monitor.m1 element=Line.sb1_p28uhs7_1247_348 mode=0
new monitor.m2 element=Line.sb1_p28uhs7_1247_348 mode=1
new energymeter.m3 Line.sb1_p28uhs7_1247_348

Set Voltagebases=[0.48, 12.47, 69.0]

Calcvoltagebases

Buscoords Buscoords.dss
set maxcontroliter=50
